#This document is named "lj2.lmp"

units lj                      #this means we are using arbitrary length and energy units, as in v_LJ: no physical units are assigned to particles.
atom_style atomic             #means we are dealing with unbonded atoms
boundary p p p                #periodic boundary conditions in all 3 dimensions

lattice fcc 0.3                     #defines a face-centered cubic lattice of number density 0.3
region my_region block 0 7 0 7 0 7 #defines a geometric simulation region named "my_region", which is a cube with side length = 7 fcc unit-cell side length
create_box 1 my_region              #creates a simulation box with 1 atom types in the region "my_region" just created
create_atoms 1 box                  #creates atoms of type "1" (there are only 1 type of particles) on the lattice in the box just created

timestep 0.001             #defines the time step (dt) of the simulation

mass 1 1.0                    #sets the mass of atoms of type "1" that we just created
velocity all create 1.5 2023    #gives all atom of a random velocity, such that the initial temperature is 1.5. 2023 is a random seed here.

pair_style lj/cut 2.5         #defines the LJ potential. It is cut off (v(r) set to 0) after r > 2.5 \sigma
pair_coeff 1 1 1.0 1.0        #sets the LJ coefficients \varepsilon and \sigma between atom types "1" and "1". We simply set both \varepsilon and \sigma to be 1.

fix 1 all nvt temp 1.5 0.01 $(10.0*dt)  #sets the equation of state: we are fixing number of particles, volume and temperature during each time step.
                                        #the 3 numbers after "temp" are thermostat parameters: intial and final temperatures, and temperature damping parameter

thermo 1000                                                                     #prints thermodynamic information every 1000 time steps
thermo_modify format line "%d %.6e %.6e %.6e %.6e %.6e %.6e %.6e %.6e %.6e" norm no     #...and specifically, print thermodynamic information in this suggested format

dump my_dump all custom 100 lj_cut.lammpstrj id type x y z vx vy vz             #dumps information of all atoms every 100 timesteps in the following custom style:
                                                                                #id of atom, type of atom, x y z coordinates, and x y z components of its velocity
dump_modify my_dump sort id

run 20000                                                                      #runs 20,000 timesteps
